// SBML level 3 version 1

model DoublePhosphorylation_DP1()
  // model units - substance: count, time: seconds, extent: mole

  // Compartments:
  compartment cell = 1 litre;

  // Species:
  species inp_DP1 in cell = 50/cell;
  species X_DP1 in cell = 50/cell;
  species C1_DP1 in cell = 0;
  species Xp_DP1 in cell = 0;
  species E_DP1 in cell = 50/cell;
  species C2_DP1 in cell = 0;
  species C3_DP1 in cell = 0;
  species out_DP1 in cell = 0;
  species C4_DP1 in cell = 0;

  // Parameters:
  k1f_DP1 = 1 per_second;
  k1r_DP1 = 1 per_second;
  k2f_DP1 = 1 per_second;
  k3f_DP1 = 1 per_second;
  k3r_DP1 = 1 per_second;
  k4f_DP1 = 1 per_second;
  k5f_DP1 = 1 per_second;
  k5r_DP1 = 1 per_second;
  k6f_DP1 = 1 per_second;
  k7f_DP1 = 1 per_second;
  k7r_DP1 = 1 per_second;
  k8f_DP1 = 1 per_second;

  // Reactions:
  r1_DP1: inp_DP1 + X_DP1 -> C1_DP1; k1f_DP1*inp_DP1*X_DP1 - k1r_DP1*C1_DP1;
  r2_DP1: C1_DP1 => inp_DP1 + Xp_DP1; k2f_DP1*C1_DP1;
  r3_DP1: E_DP1 + Xp_DP1 -> C2_DP1; k3f_DP1*E_DP1*Xp_DP1 - k3r_DP1*C2_DP1;
  r4_DP1: C2_DP1 => E_DP1 + X_DP1; k4f_DP1*C2_DP1;
  r5_DP1: inp_DP1 + Xp_DP1 -> C3_DP1; k5f_DP1*inp_DP1*Xp_DP1 - k5r_DP1*C3_DP1;
  r6_DP1: C3_DP1 => out_DP1 + inp_DP1; k6f_DP1*C3_DP1;
  r7_DP1: E_DP1 + out_DP1 -> C4_DP1; k7f_DP1*E_DP1*out_DP1 - k7r_DP1*C4_DP1;
  r8_DP1: C4_DP1 => Xp_DP1 + E_DP1; k8f_DP1*C4_DP1;

  // Unit definitions:
  unit per_second = 1 / second;
end
