// SBML level 3 version 1

model EnzymaticRxnModel2()
  // model units - substance: count, time: seconds, extent: mole

  // Compartments:
  compartment cell2 = 1 litre;

  // Species:
  species inp_DP2 in cell2 = 50/cell2;
  species X_DP2 in cell2 = 50/cell2;
  species C1_DP2 in cell2 = 0;
  species Xp_DP2 in cell2 = 0;
  species E_DP2 in cell2 = 50/cell2;
  species C2_DP2 in cell2 = 0;
  species C3_DP2 in cell2 = 0;
  species out_DP2 in cell2 = 0;
  species C4_DP2 in cell2 = 0;

  // Parameters:
  k1f2 = 1 per_second;
  k1r2 = 1 per_second;
  k2f2 = 1 per_second;
  k3f2 = 1 per_second;
  k3r2 = 1 per_second;
  k4f2 = 1 per_second;
  k5f2 = 1 per_second;
  k5r2 = 1 per_second;
  k6f2 = 1 per_second;
  k7f2 = 1 per_second;
  k7r2 = 1 per_second;
  k8f2 = 1 per_second;

  // Reactions:
  r12: inp_DP2 + X_DP2 -> C1_DP2; k1f2*inp_DP2*X_DP2 - k1r2*C1_DP2;
  r22: C1_DP2 => inp_DP2 + Xp_DP2; k2f2*C1_DP2;
  r32: E_DP2 + Xp_DP2 -> C2_DP2; k3f2*E_DP2*Xp_DP2 - k3r2*C2_DP2;
  r42: C2_DP2 => E_DP2 + X_DP2; k4f2*C2_DP2;
  r52: inp_DP2 + Xp_DP2 -> C3_DP2; k5f2*inp_DP2*Xp_DP2 - k5r2*C3_DP2;
  r62: C3_DP2 => out_DP2 + inp_DP2; k6f2*C3_DP2;
  r72: E_DP2 + out_DP2 -> C4_DP2; k7f2*E_DP2*out_DP2 - k7r2*C4_DP2;
  r82: C4_DP2 => Xp_DP2 + E_DP2; k8f2*C4_DP2;

  // Unit definitions:
  unit per_second = 1 / second;
end
