// SBML level 3 version 1

model EnzymaticRxnModel()
  // model units - substance: count, time: seconds, extent: mole

  // Compartments:
  compartment cell = 1 litre;
  compartment cell1 = 1 litre;

  // Species:
  species inp_DP2 in cell = 50/cell;
  species X_DP2 in cell = 50/cell;
  species C1_DP2 in cell = 0;
  species Xp_DP2 in cell = 0;
  species E_DP2 in cell = 50/cell;
  species C2_DP2 in cell = 0;
  species C3_DP2 in cell = 0;
  species out_DP2 in cell = 0;
  species C4_DP2 in cell = 0;

  // Parameters:
  k1f = 1 per_second;
  k1r = 1 per_second;
  k2f = 1 per_second;
  k3f = 1 per_second;
  k3r = 1 per_second;
  k4f = 1 per_second;
  k5f = 1 per_second;
  k5r = 1 per_second;
  k6f = 1 per_second;
  k7f = 1 per_second;
  k7r = 1 per_second;
  k8f = 1 per_second;

  // Reactions:
  r1: inp_DP2 + X_DP2 -> C1_DP2; k1f*inp_DP2*X_DP2 - k1r*C1_DP2;
  r2: C1_DP2 => inp_DP2 + Xp_DP2; k2f*C1_DP2;
  r3: E_DP2 + Xp_DP2 -> C2_DP2; k3f*E_DP2*Xp_DP2 - k3r*C2_DP2;
  r4: C2_DP2 => E_DP2 + X_DP2; k4f*C2_DP2;
  r5: inp_DP2 + Xp_DP2 -> C3_DP2; k5f*inp_DP2*Xp_DP2 - k5r*C3_DP2;
  r6: C3_DP2 => out_DP2 + inp_DP2; k6f*C3_DP2;
  r7: E_DP2 + out_DP2 -> C4_DP2; k7f*E_DP2*out_DP2 - k7r*C4_DP2;
  r8: C4_DP2 => Xp_DP2 + E_DP2; k8f*C4_DP2;

  // Unit definitions:
  unit per_second = 1 / second;
end
